A := [2, 2.5, 3; 3.5, 4, 4.5; 5, 5.5, 6]
B := [4, 4.5, 5; 5.5, 6, 6.5; 7, 7.5, 8]
V1 := [6; 6.5; 7]
A + B = [6, 7, 8; 9, 10, 11; 12, 13, 14]
V2 := [8; 8.5; 9]
A*B = [42.75, 46.5, 50.25; 67.5, 73.5, 79.5; 92.25, 100.5, 108.75]
transpose(V1)*V2 = 166.25
transpose(V1)*A*V2 = 2037
A*V1 = [49.25; 78.5; 107.75]
V1×V2 = [-1; 2; -1]
|V1| = 11.2805
V1*V2 = 166.25
cosV1V2 := V1*V2/(|V1|*|V2|) = 0.999891
